R1 → R1
C2 → C2
C1 → C1
R2 → R2
t0 := 0
A := [-1/(R1*C1), 0; 0, -1/(R2*R2)]  # error: This variable is undefined.
B := [1/(R1*C1); 1/(R2*C2)]  # error: This variable is undefined.
C := [1, 1]
B*transpose(B) → [1/(C1^2*R1^2), 1/(C1*C2*R1*R2); 1/(C1*C2*R1*R2), 1/(C2^2*R2^2)]
integral(e^(A*(t0 - t))*B*transpose(B)*e^(transpose(A)*(t0 - t)), t = t0 .. t1) → [
    (e^(2*t1/(C1*R1)) - 1)/(2*C1*R1), R2*(e^(t1/R2^2)*e^(t1/(C1*R1)) - 1)/(C2*(R2^2 + C1*R1));
    R2*(e^(t1/R2^2)*e^(t1/(C1*R1)) - 1)/(C2*(R2^2 + C1*R1)), (e^(2*t1/R2^2) - 1)/(2*C2^2)
]
e^(A*(t0 - t))*B*transpose(B)*e^(transpose(A)*(t0 - t)) → [
    e^(2*t/(C1*R1))/(C1^2*R1^2), e^(t/R2^2)*e^(t/(C1*R1))/(C1*C2*R1*R2);
    e^(t/R2^2)*e^(t/(C1*R1))/(C1*C2*R1*R2), e^(2*t/R2^2)/(C2^2*R2^2)
]
integral(e^(A*(t0 - t))*B*transpose(B)*e^(transpose(A)*(t0 - t)), t) → [
    e^(2*t/(C1*R1))/(2*C1*R1), R2*e^(t/R2^2 + t/(C1*R1))/(C2*R2^2 + C1*C2*R1);
    R2*e^(t/R2^2 + t/(C1*R1))/(C2*R2^2 + C1*C2*R1), e^(2*t/R2^2)/(2*C2^2)
]
transpose(C)*C → [1, 1; 1, 1]
e^(A*(t - t0))*transpose(C)*C*e^(A*(t - t0)) → [e^(-2*t/(C1*R1)), e^(-t/R2^2)*e^(-t/(C1*R1)); e^(-t/R2^2)*e^(-t/(C1*R1)), e^(-2*t/R2^2)]
